*HEADING
cubit(00_FEA/01_CUBIT/HUMAN_DYNAMIC_12_12_2009/CUBIT_TET_O1.inp): 12/19/2011: 11
version: 13.0
**
********************************** P A R T S **********************************
*PART, NAME=Part-Default
**
********************************** N O D E S **********************************
*NODE, NSET=ALLNODES
       1,   3.393609e+001,  -3.097683e+000,  -7.985626e+001
       2,   3.267455e+001,   4.952774e+000,  -8.020984e+001
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**
********************************** E L E M E N T S ****************************
*ELEMENT, TYPE=C3D4, ELSET=PART-DEFAULT_1_EB1
      10,    1347,    1351,    1349,    1355
      11,    1347,    1349,    1348,    1356
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**
********************************** P R O P E R T I E S ************************
*SOLID SECTION, ELSET=PART-DEFAULT_1_EB1, MATERIAL=DEFAULT-STEEL
**
*END PART
**
**
**
********************************** E N D   P A R T S **********************************
**
**
********************************** A S S E M B L Y ************************************
**
*ASSEMBLY, NAME=ASSEMBLY1
**
*INSTANCE, NAME=Part-Default_1, PART=Part-Default
*END INSTANCE
**
*END ASSEMBLY
**
**
**
*MATERIAL, NAME = DEFAULT-STEEL
*ELASTIC, TYPE=ISOTROPIC
2.068000e+005, 2.900000e-001
*DENSITY
7.000000e-006
*CONDUCTIVITY,TYPE=ISO
4.500000e-002
*SPECIFIC HEAT
5.000000e+002
**
*MATERIAL, NAME = DEFAULT-STEEL
*ELASTIC, TYPE=ISOTROPIC
2.068000e+005, 2.900000e-001
*DENSITY
7.000000e-006
*CONDUCTIVITY,TYPE=ISO
4.500000e-002
*SPECIFIC HEAT
5.000000e+002
**
**
************************************** H I S T O R Y *************************************
**
*PREPRINT
**
**************************************** S T E P 1 ***************************************
*STEP,INC=100,NAME=DEFAULT SET
**
*STATIC
1, 1, 1e-005, 1
**
**
**
**
*END STEP
**
**************************************** S T E P 2 ***************************************
*STEP,INC=100,NAME=DEFAULT SET
**
*STATIC
1, 1, 1e-005, 1
**
**
**
**
*END STEP
