*HEADING
cubit(ORK/00_FEA/01_CUBIT/HUMAN_DYNAMIC_12_12_2009/temp_tri.inp): 08/23/2012: 14
version: 13.0
**
********************************** P A R T S **********************************
*PART, NAME=Part-Default
**
********************************** N O D E S **********************************
*NODE, NSET=ALLNODES
       1,   3.393609e+001,  -3.097683e+000,  -7.985626e+001
       2,   3.267455e+001,   4.952774e+000,  -8.020984e+001
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**
********************************** E L E M E N T S ****************************
*ELEMENT, TYPE=STRI3, ELSET=PART-DEFAULT_1_EB1
    1210,      32,       1,     783
    1895,       1,       2,     782
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**
********************************** N O D E S E T S **********************************
*NSET, NSET=PART-DEFAULT_1_ALLNODES
       1,       2,       3,       4,       5,       6
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**
********************************** P R O P E R T I E S ************************
*SHELL SECTION, ELSET=PART-DEFAULT_1_EB1, SECTION INTEGRATION=SIMPSON, MATERIAL=DEFAULT-STEEL
1.000000e+000
**
*END PART
**
**
**
********************************** E N D   P A R T S **********************************
**
**
********************************** A S S E M B L Y ************************************
**
*ASSEMBLY, NAME=ASSEMBLY1
**
*INSTANCE, NAME=Part-Default_1, PART=Part-Default
*END INSTANCE
**
*END ASSEMBLY
**
**
**
*MATERIAL, NAME = DEFAULT-STEEL
*ELASTIC, TYPE=ISOTROPIC
2.068000e+005, 2.900000e-001
*DENSITY
7.000000e-006
*CONDUCTIVITY,TYPE=ISO
4.500000e-002
*SPECIFIC HEAT
5.000000e+002
**
**
************************************** H I S T O R Y *************************************
**
*PREPRINT
**
**************************************** S T E P 1 ***************************************
*STEP,INC=100,NAME=DEFAULT SET
**
*STATIC
1, 1, 1e-005, 1
**
**
**
**
*END STEP
